<Node name="root" gravity="0.0 -2.0 0.0" dt="0.04">

    <Node name="plugins">
        <RequiredPlugin name="ShapeMatchingPlugin"/> <!-- Needed to use components [ShapeMatchingRotationFinder] -->
        <RequiredPlugin name="Sofa.Component.Collision.Detection.Algorithm"/> <!-- Needed to use components [BVHNarrowPhase,BruteForceBroadPhase,CollisionPipeline] -->
        <RequiredPlugin name="Sofa.Component.Collision.Detection.Intersection"/> <!-- Needed to use components [NewProximityIntersection] -->
        <RequiredPlugin name="Sofa.Component.Collision.Geometry"/> <!-- Needed to use components [TriangleCollisionModel] -->
        <RequiredPlugin name="Sofa.Component.Collision.Response.Contact"/> <!-- Needed to use components [CollisionResponse] -->
        <RequiredPlugin name="Sofa.Component.Constraint.Projective"/> <!-- Needed to use components [FixedConstraint] -->
        <RequiredPlugin name="Sofa.Component.Engine.Select"/> <!-- Needed to use components [BoxROI] -->
        <RequiredPlugin name="Sofa.Component.IO.Mesh"/> <!-- Needed to use components [MeshOBJLoader] -->
        <RequiredPlugin name="Sofa.Component.LinearSolver.Iterative"/> <!-- Needed to use components [CGLinearSolver] -->
        <RequiredPlugin name="Sofa.Component.Mapping.Linear"/> <!-- Needed to use components [IdentityMapping] -->
        <RequiredPlugin name="Sofa.Component.Mass"/> <!-- Needed to use components [UniformMass] -->
        <RequiredPlugin name="Sofa.Component.MechanicalLoad"/> <!-- Needed to use components [PlaneForceField,SphereForceField] -->
        <RequiredPlugin name="Sofa.Component.ODESolver.Backward"/> <!-- Needed to use components [EulerImplicitSolver] -->
        <RequiredPlugin name="Sofa.Component.SolidMechanics.Spring"/> <!-- Needed to use components [MeshSpringForceField,QuadBendingSprings] -->
        <RequiredPlugin name="Sofa.Component.StateContainer"/> <!-- Needed to use components [MechanicalObject] -->
        <RequiredPlugin name="Sofa.Component.Topology.Container.Grid"/> <!-- Needed to use components [RegularGridTopology] -->
        <RequiredPlugin name="Sofa.GL.Component.Rendering3D"/> <!-- Needed to use components [OglModel] -->
    </Node>

    <CollisionPipeline verbose="0" draw="0" />
    <BruteForceBroadPhase />
    <BVHNarrowPhase />
    <CollisionResponse name="Response" />
    <NewProximityIntersection alarmDistance="0.002" contactDistance="0.001" />
    <DefaultAnimationLoop />
    <DefaultVisualManagerLoop />
    <Node name="Floor">
        <RegularGridTopology nx="2" ny="1" nz="2" xmin="20" xmax="-20" ymin="-3.05" ymax="-3.05" zmin="-20" zmax="20" />
        <MechanicalObject />
        <!--
		<Triangle simulated="0" moving="0" />
		<Line simulated="0" moving="0" />
		<Point simulated="0" moving="0" />
			  -->
        <Node name="Visu">
            <OglModel name="Visual" color="red" />
            <IdentityMapping input="@.." output="@Visual" />
        </Node>
    </Node>
    <Node name="SquareCloth1">
        <EulerImplicitSolver />
        <CGLinearSolver iterations="10" threshold="0.000001" tolerance="1e-5"/>
        <RegularGridTopology nx="25" ny="1" nz="25" xmin="12" xmax="-12" ymin="7" ymax="7" zmin="-12" zmax="12" />
        <MechanicalObject />
        <UniformMass rayleighMass="0.05" totalMass="100" />
        <BoxConstraint box="-12.1 7 11.9 -9.9 7 12.1    9.9 7 11.9 12.1 7 12.1" />
        <MeshSpringForceField name="Springs" stiffness="1000" damping="0" />
        <QuadBendingSprings name="Bend" stiffness="2000" damping="1" />
        <SphereForceField stiffness="1000" damping="1" center="0 1 3" radius="4" />
        <PlaneForceField stiffness="1000" damping="20" normal="0 1 0" d="-3" />
        <ShapeMatchingRotationFinder showRotations="true" axisToFlip="1" />
        <Node name="Visu">
            <OglModel name="Visual" color="green" />
            <IdentityMapping input="@.." output="@Visual" />
        </Node>
        <TriangleCollisionModel />
    </Node>
    <Node name="Sphere">
        <MeshOBJLoader name='myLoader' filename='mesh/sphere.obj' scale="3.95" translation="0 1 3" />
        <OglModel name="Visual"src='@myLoader' color="blue"/>
    </Node>
</Node>
